// COMSOL Multiphysics 5.6.0.280 model "isothermal reactor design - finding optimum temperature.mph"
// Outline of the model tree

Parameters
  Kco = Kco - 3

Variables
  var1 "Variables 1"

Physics
  ge: GlobalEquations "Global ODEs and DAEs"
    ge1: GlobalEquations
      name = {z0, Kc, X, z, Kco, To, E, H, R, Xo}
      equation = {zo - (Xo)/((1-Xo)^2 - (Xo^2/Kco)), Kc - Kco*exp((H/R)*(1/To - 1/t)), (X)/((1-X)^2 - (X^2/Kc)) - z, z - zo*exp((-E/R)*(1/t - 1/To)), Kco - 3, To - 300, E - 62787, H + 104645, R - 8.314, Xo - 0.4}
      initialValueU = {0, 0, 0, 0, 0, 0, 0, 0, 0, 0}
      initialValueUt = {0, 0, 0, 0, 0, 0, 0, 0, 0, 0}
      description = {, , , , , , , , , }
      valueType = complex
      DependentVariableQuantity = dimensionless
      CustomDependentVariableUnit = m
      SourceTermQuantity = dimensionless
      CustomSourceTermUnit = m

Studies
  std1 "Study 1"
    stat: Stationary
  std2 "Study 2"
    time: Transient "Time Dependent" | tlist = range(0,0.1,1)
  std3 "Study 3"

Solver configurations
  sol1 "Solution 1" (study std1)
    v1: Variables "Dependent Variables 1"
    s1: Stationary "Stationary Solver 1"
      dDef: Direct
      fcDef: FullyCoupled
  sol2 "Solution 2" (study std2)
    v1: Variables "Dependent Variables 1"
    t1: Time "Time-Dependent Solver 1" | tlist = range(0,0.1,1)
      dDef: Direct
      fc1: FullyCoupled | linsolver = dDef
  sol3 "Solution 3" (study std3)
    v1: Variables "Dependent Variables 1"

Datasets
  dset1: Solution | solution = sol1
  dset2: Solution | solution = sol2
  dset3: Solution | solution = sol3