// COMSOL Multiphysics 5.6.0.280 model "simultaneous ode.mph"
// Outline of the model tree

Parameters
  k1 = 0.02
  k2 = 0.00004
  k3 = 0.0004
  k4 = 0.04

Variables
  var1 "Variables 1"

Physics
  ge: GlobalEquations "Global ODEs and DAEs"
    ge1: GlobalEquations
      name = {x, y}
      equation = {xt-k1*x+k2*x*y, yt-k3*x*y+k4*y}
      initialValueU = {500, 200}
      initialValueUt = {0, 0}
      description = {, }
      valueType = complex
      DependentVariableQuantity = dimensionless
      CustomDependentVariableUnit = m
      SourceTermQuantity = dimensionless
      CustomSourceTermUnit = m

Studies
  std1 "Study 1"
    time: Transient "Time Dependent" | tunit = d; tlist = range(0,100,1000)

Solver configurations
  sol1 "Solution 1" (study std1)
    v1: Variables "Dependent Variables 1"
    t1: Time "Time-Dependent Solver 1" | tlist = range(0,100,1000)
      dDef: Direct
      fc1: FullyCoupled | linsolver = dDef

Datasets
  dset1: Solution | solution = sol1